// SBML level 3 version 1

model main()
  // model units - substance: mole, time: second, volume: litre, extent: mole

  // Compartments:
  compartment cell = 1;

  // Species:
  species $E in cell = 0.5;
  species S in cell = 1;
  species $ES in cell = 0.5;
  species P in cell = 0;
  species $E_total in cell = 1;

  // Parameters:
  k1_on = 1 litre_per_mole_per_second;
  k1_off = 0.5 per_second;
  k2 = 0.5 per_second;

  // Algebraic rules:
  0 = k1_on*E*S - (k1_off + k2)*ES;
  0 = E + ES - E_total;

  // Reactions:
  r1: $E + S -> $ES; cell*(k1_on*E*S - k1_off*ES);
  r2: $ES => $E + P; cell*k2*ES;

  // Unit definitions:
  unit per_second = 1 / second;
  unit mole_per_litre = mole / litre;
  unit litre_per_mole_per_second = litre / (mole * second);
end
