// SBML level 3 version 1

model main()
  // model units - time: time

  // Parameters:
  b7 has m_per_sec;
  b6 has _1_per_sec;
  b5 has _1_per_sec;
  b4 = 10 m_per_sec;
  b3 = 2 m2;
  h4 = 1 m2;
  b1 has m2;
  b0 = 3 dimensionless;
  c7 has m_per_sec_x_min;
  c5 has dimensionless;
  c4 has m2_per_sec;
  c3 has m2;
  c0 has second;
  a6 = 1 dimensionless;
  a5 = 1 dimensionless;
  a4 = 4 metre;
  a3 = 1 m2;
  a1 = 16 m4;
  s6 = 1 second;
  a0 = 2 second;

  // Assignment rules:
  b6 := a6/s6;
  b7 := 10 m/(2 sec);
  c7 := b7*3 min;
  c3 := a3 + abs(b3);
  c4 := a4*b4;
  b5 := 1/(1 sec);
  c5 := b5*1 min*60;
  c0 := a0*b0;

  // Rate rules:
  h4' = c4*(-1);

  // Algebraic rules:
  0 = b1^2 - a1;

  // Unit definitions:
  unit m_per_sec_x_min = 60 metre; m_per_sec_x_min is "m/sec*min";
  unit m_per_sec = metre / second; m_per_sec is "m/sec";
  unit min = 60 second;
  unit _1_per_sec = 1 / second; _1_per_sec is "1/sec";
  unit m2_per_sec = metre^2 / second; m2_per_sec is "m^2/sec";
  unit m4 = metre^4; m4 is "m^4";
  unit m2 = metre^2; m2 is "m^2";
  unit time = second;
end
