// SBML level 3 version 1

function neighborQuantityLeft(a)
  0;
end

function neighborQuantityRight(a)
  0;
end

function neighborQuantityAbove(a)
  0;
end

function neighborQuantityBelow(a)
  0;
end

function getCompartmentLocationX(a)
  0;
end

function getCompartmentLocationY(a)
  0;
end

function A__neighborQuantityLeft(a)
  0;
end

function A__neighborQuantityRight(a)
  0;
end

function A__neighborQuantityAbove(a)
  0;
end

function A__neighborQuantityBelow(a)
  0;
end

function A__getCompartmentLocationX(a)
  0;
end

function A__getCompartmentLocationY(a)
  0;
end

model exchangetest()
  // testmod

  // Compartments:
  compartment Cell = 1;

  // Species:
  species A__S1 in Cell;

  // Parameters:
  R = 20;
  timeconv = 60;
  extentconv = 10;
  cf = 100;
  X = ;
  U1 = ;
  kr_f = 0.5; kr_f is "Forward repression binding rate";
  kr_r = 1; kr_r is "Reverse repression binding rate";
  ka_f = 0.0033; ka_f is "Forward activation binding rate";
  ka_r = 1; ka_r is "Reverse activation binding rate";
  kc_f = 0.05; kc_f is "Forward complex formation rate";
  kc_r = 1; kc_r is "Reverse complex formation rate";
  ko_f = 0.033; ko_f is "Forward RNAP binding rate";
  ko_r = 1; ko_r is "Reverse RNAP binding rate";
  kao_f = 1; kao_f is "Forward activated RNAP binding rate";
  kao_r = 1; kao_r is "Reverse activated RNAP binding rate";
  kmdiff_f = 1; kmdiff_f is "Forward membrane diffusion rate";
  kmdiff_r = 0.01; kmdiff_r is "Reverse membrane diffusion rate";
  kd = 0.0075; kd is "Degradation rate";
  kecd = 0.005; kecd is "Extracellular degradation rate";
  nc = 2; nc is "Stoichiometry of binding";
  nr = 30; nr is "Initial RNAP count";
  ko = 0.05; ko is "Open complex production rate";
  kb = 0.0001; kb is "Basal production rate";
  ng = 2; ng is "Initial promoter count";
  np = 10; np is "Stoichiometry of production";
  ka = 0.25; ka is "Activated production rate";
  kecdiff = 1; kecdiff is "Extracellular diffusion rate";
  A__y = ;
  A__k1 = ;
  A__kr_f = 0.5; A__kr_f is "Forward repression binding rate";
  A__kr_r = 1; A__kr_r is "Reverse repression binding rate";
  A__ka_f = 0.0033; A__ka_f is "Forward activation binding rate";
  A__ka_r = 1; A__ka_r is "Reverse activation binding rate";
  A__kc_f = 0.05; A__kc_f is "Forward complex formation rate";
  A__kc_r = 1; A__kc_r is "Reverse complex formation rate";
  A__ko_f = 0.033; A__ko_f is "Forward RNAP binding rate";
  A__ko_r = 1; A__ko_r is "Reverse RNAP binding rate";
  A__kao_f = 1; A__kao_f is "Forward activated RNAP binding rate";
  A__kao_r = 1; A__kao_r is "Reverse activated RNAP binding rate";
  A__kmdiff_f = 1; A__kmdiff_f is "Forward membrane diffusion rate";
  A__kmdiff_r = 0.01; A__kmdiff_r is "Reverse membrane diffusion rate";
  A__kd = 0.0075; A__kd is "Degradation rate";
  A__kecd = 0.005; A__kecd is "Extracellular degradation rate";
  A__nc = 2; A__nc is "Stoichiometry of binding";
  A__nr = 30; A__nr is "Initial RNAP count";
  A__ko = 0.05; A__ko is "Open complex production rate";
  A__kb = 0.0001; A__kb is "Basal production rate";
  A__ng = 2; A__ng is "Initial promoter count";
  A__np = 10; A__np is "Stoichiometry of production";
  A__ka = 0.25; A__ka is "Activated production rate";
  A__kecdiff = 1; A__kecdiff is "Extracellular diffusion rate";

  // Assignment rules:
  Q := (X/cf - 3)*cf;
  U2 := X/cf*cf;

  // Rate rules:
  X' = 0.2*cf/extentconv;
  U1' = 0.3*cf/extentconv;

  // Reactions:
  A___J0: A__S1 -> ; timeconv/extentconv*A__k1*A__S1;

  // Events:
  A___E0: at (X/cf > 3), priority = Q/cf: A__y = 4;
  A___E1: at (X/cf > 3), priority = R/cf: A__y = 5;
end
